finish
/clear,nostart
/PREP7
ET,1,PLANE183
KEYOPT,1,3,2
mp,EX,1,77820
MP,NUXY,1,0.349
RECTNG,0,25,0,25
CYL4,0,0,5
ASBA,1,2
LESIZE,1,,,5,4
LLIST,ALL
lesize,line_9,,,5,4
lesize,9,,,5,4
lesize,9,,,5,-4
lesize,10,,,5,4
lesize,10,,,5,-4
lesize,2,,,5
lesize,3,,,5
lesize,5,,,10
allsel,all
aatt,ti,,1
amesh,all
allsel,all
nsel,s,loc,x,-incc,incc
d,all,ux,0
allsel,all
nsel,s,loc,y,-incc,incc
d,all,uy,0
allsel,all
nsel,s,loc,x,plt_wid/2-incc,plt_wid/2+incc
nsel,a,loc,y,plt_thk/2-incc,plt_thk/2+incc
sf,all,pres,pressr
allsel
solve
allsel,all
solve
finish
/clear,nostart
/prep7
ET,1,PLANE183
keyopt,1,3,2
mp,ex,1,77820
mp,nuxy,1,0.349
rectng,0,25,0,25
cyl4,0,0,5
asba,1,2
asba,2,1
llist,all
lesize,9,,,5,4
lesize,9,,,5,-4
lesize,10,,,5,4
lesize,5,,,10
lesize,2,,,5
lesize,3,,,5
lesize,10,,,5,-4
allsel,all
aatt,ti,,1
amesh,all
allsel,all
nsel,s,loc,x,-incc,incc
d,all,ux,0
allsel,all
nsel,s,loc,-incc,incc
nsel,s,loc,y,-incc,incc
d,all,uy,0
allsel,all
pressr=90
pressr=50
allsel,all
nsel,s,loc,x,plt_wid/2-incc,plt_wid/2+incc
nsel,a,loc,y,plt_thk/2-incc,plt_thk/2+incc
sf,all,pres,pressr
allsel
/solu
solve
